# Resonant driving of two-level system
# Input energy splitting and coupling
ω_kl := 0
V := 1
# Rabi frequency:
Ω(ω) := 1/2*sqrt(V^2 + (ω_kl - ω)^2)
# Probability of transfer from intial state (l) to final state (k)
P(t, ω) := V^2/(V^2 + (ω_kl - ω)^2)*sin(Ω(ω)*t)^2
# Time axis:
i := 0 .. 500
τ[i] := i/50
# Evalulate time-dependence for four values of the detuning ω_kl-ω.
n := 0 .. 3  # Here the units of detuning should be measured with respect to the coupling:
ω[n] := 0, 0.5, 1, 3
# Detuning :
Δ[n] := ω[n] - ω_kl
Δ = [0; 0.5; 1; 3]
Δ/V = [0; 0.5; 1; 3]
P1[i] := P(τ[i], ω[0])
P2[i] := P(τ[i], ω[1])
P3[i] := P(τ[i], ω[2])
P4[i] := P(τ[i], ω[3])
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# Now investigate the detuning dependence of the transfer probability as a function of time.
j := 0 .. 200
ω[j] := (100 - j)/10
t[n] := 1, 2.5, 5, 7.5
P_max(ω) := (V^2/(V^2 + (ω_kl - ω)^2))
P1[j] := P(t[0], ω[j])
P2[j] := P(t[1], ω[j])
P3[j] := P(t[2], ω[j])
P4[j] := P(t[3], ω[j])
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