# Time development of a coupled two level system
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# The Hamiltonian for this case is:
# Given that you start in state |a>, what is the time-dependent probability of ending up in state |b>?
# Frequency splitting:
Δ := 1
# Rabi frequency:
Ω(V) := sqrt(V^2 + Δ^2)  # Note here I have expressed energy as inverse time. E/hbar
P(t, V) := (V^2/(V^2 + Δ^2))*sin(Ω(V)*t)^2
# Define a time grid:
i := 0 .. 500
τ[i] := i/50
# Calculate probabilities for different values of the coupling: V/Δ = 0.1, 0.5, 1, 5
P1[i] := P(τ[i], 5)
P2[i] := P(τ[i], 1)
P3[i] := P(τ[i], 0.5)
P4[i] := P(τ[i], 0.1)
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