# Absorption Lineshape for the Displaced Harmonic Oscillator Model
# Investigate the low temperature lineshape for electronic transition coupled to a single harmonic mode.
# We will perform calculations for three couplings: weak medium, and strong:
z := 0, 1 .. 2
# Lets work in units of
hbar := 1
μ_eg := 1
m := 1
# Define the frequency of the electronic transition:
#
# and the vibrational frequency:
ω_eg := 10
ω_0 := 1
# Set up displacement grid
i := 0 .. 200
q[i] := -5 + 0.05*i
# Set up time grid
t[i] := i*0.1
# Set up frequency grid:
ω[i] := -4 + ω_eg + 0.05*i
# The unitless displacement of the two harmonic wells is:
D[z] := 0.2, 1, 2
# Ground and excited state potential energy surfaces
V_g(qx) := 1/2*m*ω_0^2*qx^2
V_e(q, D) := ω_eg + 1/2*m*ω_0^2*(q - sqrt(2*D*hbar/(m*ω_0)))^2
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# Lineshape function, Dephasing function and dipole correlation function
g(t, D) := -D*(e^(-1i*ω_0*t) - 1)
F(t, D) := e^(-g(t, D))
C(t, D) := |μ_eg|^2*e^(-1i*ω_eg*t - g(t, D))
# Plot the correlation function and dephasing function for low and high coupling
D[0] = 0.2
D[2] = 2
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# Absorption lineshape:
δ(g) := if(g == 0, 1, 0)
σ(ω, D) := |μ_eg|^2*e^(-D)*sum(D^J/J!*δ(ω - ω_eg - J*ω_0), J = 0 .. 10)
# Envelope of vibronic progression:
Env(ω, D) := sqrt(π/(D*ω_0^2))*0.25*|μ_eg|^2*exp(-(ω - ω_eg - D*ω_0)^2/(2*D*ω_0^2))
# Plot lineshapes for low, mid and high coupling.
(a)
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D[0] = 0.2
(b)
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D[1] = 1
(c)
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D[2] = 2
D = [0.2; 1; 2]
ω_0 = 1
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