# Absorption Lineshape for the Displaced Harmonic Oscillator Model
# Finite temperature calculations
# Lets work in units of
k := 1
hbar := 1
# Define the frequency of the electronic transition:
#
# and the vibrational frequency:
Ω_0 := 10
ω_eg := Ω_0
ω_0 := 1
# The unitless displacement of the two harmonic wells is:
D := 0.5
# Define thermal occupation factor
n(T) := (exp(hbar*ω_0/(k*T)) - 1)^-1
δ(g) := if(g == 0, 1, 0)
# Set up frequency grid:
i := 0 .. 100
ω[i] := -5 + Ω_0 + 0.1*i
# Absorption lineshape:
σ(ω, T) := π*e^(-D*(2*n(T) + 1))*sum(sum(D^(J + K)/(J!*K!)*(n(T) + 1)^J*n(T)^K*δ(ω - ω_eg - (J - K)*ω_0), K = 0 .. 10), J = 0 .. 10)
# Envelope of vibronic progression:
Env(ω, T) := sqrt(π/(D*ω_0^2*(2*n(T) + 1)))*exp(-(ω - ω_eg - D*ω_0)^2/(2*D*ω_0^2*(2*n(T) + 1)))
# Plot lineshapes for low, mid and high temperatures.  Temperature is defined relative to nuclear frequency (T/ω)
(a)
T := 0.01
ω_0/T == ∞
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(b)
T := 1
ω_0/T = 1
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(c)
T := 3
ω_0/T = 0.333333
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D = 0.5
ω_0 = 1
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ω_0/T = 0.333333
ω_0/T == 1
ω_0/T == ∞
