# Gaussian-stochastic model for the absorption lineshape
# This worksheet plots the frequency correlation function Cωω, dephasing function F, and absorption lineshape σ.  The
# parameters that determine the lineshape are the width of the frequency distribution Δ and the frequency correlation
# time τ_c. Defining κ = Δτ_c, we will investigate the fast (κ>1), intermediate (κ=1) and slow (κ <1) modulation cases.
# First define variables.
# Range variables for the time and frequency axes :
ma := 2^12
i := 0 .. ma - 1
ii := 0 .. 2^13 - 1
# time grid:
t[i] := i*0.1
# We will perform all calculations for a fixed value of Δ, and calculate for three correlation times:
z := 0, 1 .. 2
Δ := 1
τ_c[z] := 0.2, 1, 10
κ[z] := τ_c[z]*Δ
κ = [0.2; 1; 10]
# Define the lineshape function and dephasing function:
g(t, τ_c) := (Δ^2*τ_c^2*(exp(-t/τ_c) + t/τ_c - 1))
F(t, τ_c) := exp(-g(t, τ_c))
# Evaluate the correlation function and lineshape function
Cω_fast[i] := exp(-t[i]/τ_c[0])
Cω_slow[i] := exp(-t[i]/τ_c[2])
Cω_mid[i] := exp(-t[i]/τ_c[1])
F_fast[ii] := 0
F_slow[ii] := 0
F_mid[ii] := 0
F_fast[i] := F(t[i], τ_c[0])
F_slow[i] := F(t[i], τ_c[2])
F_mid[i] := F(t[i], τ_c[1])
# fast
#
# mid
#
# slow
Δ = 1
τ_c = [0.2; 1; 10]
κ = [0.2; 1; 10]
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# Now Fourier transform the dipole correlation function Cμμ and use the real part to obtain the lineshape.
Cμ_fast[i] := F(t[i], τ_c[0])
Cμ_slow[i] := F(t[i], τ_c[2])
Cμ_mid[i] := F(t[i], τ_c[1])
S_fast := cfft(Cμ_fast)
S_slow := cfft(Cμ_slow)
S_mid := cfft(Cμ_mid)
# Some manipulations to wrap and normalize the Fourier transform:
σ_fast := stack(S_fast, S_fast)/max(Re(S_fast))
σ_slow := stack(S_slow, S_slow)/max(Re(S_slow))
σ_mid := stack(S_mid, S_mid)/max(Re(S_mid))
# Determine the frequency axis for the Fourier transform
freq := 1/(t[1] - t[0])
t_max := t[ma - 1]
ω[ii] := ii*freq/(π*t_max)
Ω := ω[ma - 1]
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